// SBML level 2 version 3

model Calcium_Oscillate()

  // Compartments:
  compartment cell = 1;

  // Species:
  species S1 in cell = 10^Ga_0; S1 is "Ga()";
  species S2 in cell = 10^PLC_0; S2 is "PLC()";
  species S3 in cell = 10^Ca_0; S3 is "Ca()";

  // Parameters:
  k1 = 2.1061;
  k2 = 0.4548;
  k3 = 0.1818;
  K4 = 2.0585;
  k5 = 0.6884;
  K6 = 2.8516;
  k7 = 0.0934;
  k8 = 4.2881;
  K9 = 4.2435;
  k10 = 1.1329;
  k11 = 4.9664;
  K12 = 1.9839;
  Ga_0 = 0.7797;
  PLC_0 = 0.7797;
  Ca_0 = 0.7797;
  dummy = 1;

  // Initial assignments:
  _rateLaw1 = 10^k1;
  _rateLaw2 = 10^k2;
  _rateLaw5 = 10^k7;
  _rateLaw7 = 10^k10;

  // Assignment rules:
  Ga := 0 + S1;
  PLC := 0 + S2;
  Ca := 0 + S3;
  _rateLaw3 := 10^k3/(10^K4 + Ga);
  _rateLaw4 := 10^k5/(10^K6 + Ga);
  _rateLaw6 := 10^k8/(10^K9 + PLC);
  _rateLaw8 := 10^k11/(10^K12 + Ca);

  // Reactions:
  R1: => S1; _rateLaw1;
  R2: S1 => S1 + S1; _rateLaw2*S1;
  R3: S1 + S2 => S2; _rateLaw3*S1*S2;
  R4: S1 + S3 => S3; _rateLaw4*S1*S3;
  R5: S1 => S1 + S2; _rateLaw5*S1;
  R6: S2 => ; _rateLaw6*S2;
  R7: S1 => S1 + S3; _rateLaw7*S1;
  R8: S3 => ; _rateLaw8*S3;

  // Unit definitions:
  unit substance = item;
end
